// SBML level 2 version 1

function k2(UbE, V2, V2prime)
  UbE*V2 + (1 + (-1*UbE))*V2prime;
end

function k6(UbE2, V6, V6prime)
  UbE2*V6 + (1 + (-1*UbE2))*V6prime;
end

function kwee(Wee1, Vw, Vwprime)
  Vwprime*(1 + (-1*Wee1)) + Vw*Wee1;
end

function k25(Cdc25, V25, V25prime)
  Cdc25*V25 + (1 + (-1*Cdc25))*V25prime;
end

model NovakTyson1997CellModel()
  // Novak1997_CellCycle
  // This a model from the article:
  // Modeling the control of DNA replication in fission yeast.
  // Novak B, Tyson JJ Proc. Natl. Acad. Sci. U.S.A.1997:94(17):9147-52 9256450,
  // Abstract:
  // A central event in the eukaryotic cell cycle is the decision to commence DNA replication (S phase). Strict controls normally operate to prevent repeated rounds of DNA replication without intervening mitoses ("endoreplication") or initiation of mitosis before DNA is fully replicated ("mitotic catastrophe"). Some of the genetic interactions involved in these controls have recently been identified in yeast. From this evidence we propose a molecular mechanism of "Start" control in Schizosaccharomyces pombe. Using established principles of biochemical kinetics, we compare the properties of this model in detail with the observed behavior of various mutant strains of fission yeast: wee1(-) (size control at Start), cdc13Delta and rum1(OP) (endoreplication), and wee1(-) rum1Delta (rapid division cycles of diminishing cell size). We discuss essential features of the mechanism that are responsible for characteristic properties of Start control in fission yeast, to expose our proposal to crucial experimental tests.
  // This model originates from BioModels Database: A Database of Annotated Published Models. It is copyright (c) 2005-2009 The BioModels Team.
  // For more information see the terms of use.
  // To cite BioModels Database, please use Le Novère N., Bornstein B., Broicher A., Courtot M., Donizelli M., Dharuri H., Li L., Sauro H., Schilstra M., Shapiro B., Snoep J.L., Hucka M. (2006) BioModels Database: A Free, Centralized Database of Curated, Published, Quantitative Kinetic Models of Biochemical and Cellular Systems Nucleic Acids Res., 34: D689-D691.
  // biomodels.db:BIOMD0000000007
  // isDescribedBy pubmed:9256450
  // isHomologTo reactome:REACT_152
  // taxonomy:4896
  // isVersionOf kegg.pathway:ko04110 GO:0000278

  // Compartments:
  compartment Cell = 1 volume;  // GO:0005623

  // Species:
  species UbE in Cell = 1/Cell; UbE is "ubiquitinProtease1";  // isVersionOf GO:0000502
  species UbE2 in Cell = 0; UbE2 is "ubiquitinProtease2";  // isVersionOf GO:0000502
  species Wee1 in Cell = 0;  // hasVersion uniprot:P07527 uniprot:P30290
  species Cdc25 in Cell = 0;  // uniprot:P06652
  species G2K in Cell = 0; G2K is "Cdc13_Cdc2";  // hasPart uniprot:P10815 uniprot:P04551
  species R in Cell = 0.4/Cell; R is "FreeRum1";  // isVersionOf uniprot:P40380
  species G1K in Cell = 0; G1K is "Cig2_Cdc2";  // hasPart uniprot:P36630 uniprot:P04551
  species IE in Cell = 0; IE is "IntermediaryEnzyme";
  species PG2 in Cell = 0; PG2 is "Cdc13_P-Cdc2";  // hasPart uniprot:P10815 uniprot:P04551
  species G1R in Cell = 0; G1R is "Cig2_Cdc2_Rum1";  // hasPart uniprot:P40380 uniprot:P04551 uniprot:P36630
  species G2R in Cell = 0; G2R is "Cdc13_Cdc2_Rum1";  // hasPart uniprot:P40380 uniprot:P10815 uniprot:P04551
  species PG2R in Cell = 0; PG2R is "Cdc13_P-Cdc2_Rum1";  // hasPart uniprot:P40380 uniprot:P04551 uniprot:P10815
  species SPF in Cell; SPF is "S-phasePromotingFactor";  // hasPart uniprot:P10815 uniprot:P04551 uniprot:P36630
  species MPF in Cell; MPF is "M-phasePromotingFactor";  // hasPart uniprot:P04551 uniprot:P10815
  species $IEB in Cell; IEB is "BoundIntermediaryEnzyme";
  species $UbEB in Cell; UbEB is "BoundUbiquitinProtease1";  // isVersionOf GO:0000502
  species $UbE2B in Cell; UbE2B is "BoundUbiquitinProtease2";  // isVersionOf GO:0000502
  species $Wee1B in Cell; Wee1B is "BoundWee1";  // hasVersion uniprot:P30290 uniprot:P07527
  species $Cdc25B in Cell; Cdc25B is "BoundCdc25";  // isVersionOf uniprot:P06652
  species Rum1Total in Cell; Rum1Total is "TotalRum1";  // uniprot:P40380
  species Cdc13Total in Cell; Cdc13Total is "TotalCdc13";  // uniprot:P10815
  species Cig2Total in Cell; Cig2Total is "TotalCig2";  // uniprot:P36630

  // Parameters:
  // mass growth rate
  mu = 0.00495;
  Mass = 1;
  // G2K production rate
  k1 = 0.015;
  k2prime = 0.05; k2prime is "k2'";
  // Rum1 production rate
  k3 = 0.09375;
  // Rum1 degradation rate
  k4 = 0.1875;
  // G1k production rate
  k5 = 0.00175;
  k6prime = 0; k6prime is "k6'";
  // Rum1/G2K binding rate
  k7 = 100;
  // G2R dissociation rate
  k7r = 0.1;
  // Rum1/G1K binding rate
  k8 = 10;
  k8r = 0.1;
  kc = 1;
  kcr = 0.25;
  ki = 0.4;
  kir = 0.1;
  // Rum1 Phosphorylation Rate
  kp = 3.25;
  ku = 0.2;
  kur = 0.1;
  ku2 = 1;
  kur2 = 0.3;
  kw = 1;
  kwr = 0.25;
  V2 = 0.25;
  V2prime = 0.0075; V2prime is "V2'";
  V6 = 7.5;
  V6prime = 0.0375; V6prime is "V6'";
  V25 = 0.5;
  V25prime = 0.025; V25prime is "V25'";
  Vw = 0.35;
  Vwprime = 0.035; Vwprime is "Vw'";
  Kmc = 0.1;
  Kmcr = 0.1;
  Kmi = 0.01;
  Kmir = 0.01;
  Kmp = 0.001;
  Kmu = 0.01;
  Kmur = 0.01;
  Kmu2 = 0.05;
  Kmur2 = 0.05;
  Kmw = 0.1;
  Kmwr = 0.1;
  alpha = 0.25;
  beta = 0.05;
  Cig1 = 0;

  // Assignment rules:
  IEB := 1 + (-1*IE);
  UbEB := 1 + (-1*UbE);
  UbE2B := 1 + (-1*UbE2);
  Wee1B := 1 + (-1*Wee1);
  Cdc25B := 1 + (-1*Cdc25);
  Rum1Total := G1R + G2R + PG2R + R;
  Cdc13Total := G2K + G2R + PG2 + PG2R;
  Cig2Total := G1K + G1R;
  MPF := G2K + beta*PG2;
  SPF := Cig1 + alpha*G1K + MPF;

  // Rate rules:
  Mass' = Mass*mu;

  // Reactions:
  G2K_Creation: => G2K; k1; G2K_Creation is "Cdc13_Cdc2 creation";
  G1K_Creation: => G1K; k5; G1K_Creation is "Cig2_Cdc2 creation";
  Cdc2Phos: G2K -> PG2; G2K*kwee(Wee1, Vw, Vwprime) + (-1*k25(Cdc25, V25, V25prime)*PG2); Cdc2Phos is "Cdc2 phosphorylation";  // modifiers: Wee1, Cdc25; isVersionOf ec-code:2.7.10.2 GO:0006468; hasPart reactome:REACT_6178 reactome:REACT_6257; hasPart reactome:REACT_6327 reactome:REACT_6294
  G2R_Creation: G2K + R -> G2R; G2K*k7*R + (-1*G2R*k7r); G2R_Creation is "binding of Rum1 with Cdc13_Cdc2";  // isVersionOf GO:0006461
  PG2R_Creation: PG2 + R -> PG2R; k7*PG2*R + (-1*k7r*PG2R); PG2R_Creation is "binding of Rum1 with Cdc13_P-Cdc2";  // isVersionOf GO:0006461
  Rum1DegInG2R: G2R => G2K; G2R*k4; Rum1DegInG2R is "Rum1 degradation in Rum1_Cdc13_Cdc2";  // isVersionOf GO:0030163
  Rum1Deg: R => ; k4*R; Rum1Deg is "Rum1 degradation in solution";  // isVersionOf GO:0030163
  Rum1DegInPG2R: PG2R => PG2; k4*PG2R; Rum1DegInPG2R is "Rum1 degradation in Rum1_Cdc13_P-Cdc2";  // isVersionOf GO:0030163
  RumDegInG1R: G1R => G1K; G1R*k4; RumDegInG1R is "Rum1 degradation in Rum1_Cig2_Cdc2";  // isVersionOf GO:0030163
  G2K_dissoc: G2K => ; G2K*k2(UbE, V2, V2prime); G2K_dissoc is "Cdc13 degradation in Cdc13_Cdc2";  // modifiers: UbE; isVersionOf GO:0008054
  PG2_dissoc: PG2 => ; k2(UbE, V2, V2prime)*PG2; PG2_dissoc is "Cdc13 degradation in Cdc13_P-Cdc2";  // modifiers: UbE; isVersionOf GO:0008054
  G1K_Dissociation: G1K => ; G1K*k6(UbE2, V6, V6prime); G1K_Dissociation is "Cig2 degradation in Cig2_Cdc2";  // modifiers: UbE2; isVersionOf GO:0008054
  PG2R_Dissociation: PG2R => R; k2prime*PG2R; PG2R_Dissociation is "Cdc13 degradation in Rum1_Cdc13_P-Cdc2";  // isVersionOf GO:0008054
  G2R_Dissociation: G2R => R; G2R*k2prime; G2R_Dissociation is "Cdc13 degradation in Rum1_Cdc13_Cdc2";  // isVersionOf GO:0008054
  G1R_Dissociation: G1R => R; G1R*k6prime; G1R_Dissociation is "Cig2 degradation in Rum1_Cig2_Cdc2";  // isVersionOf GO:0008054
  G1R_Binding: G1K + R -> G1R; G1K*k8*R + (-1*G1R*k8r); G1R_Binding is "Binding of Rum1 to Cig2_Cdc2";  // isVersionOf GO:0006461
  G2R_Dissociation_UbE: G2R => R; G2R*k2(UbE, V2, V2prime); G2R_Dissociation_UbE is "UbE mediated degradation of Cdc13_Cdc2 in Rum1_Cdc13_Cdc2";  // modifiers: UbE; isVersionOf kegg.pathway:spo04120 GO:0030163
  PG2R_Dissociation_UbE: PG2R => R; k2(UbE, V2, V2prime)*PG2R; PG2R_Dissociation_UbE is "UbE mediated degradation of Cdc13_Cdc2 in Rum1_Cdc13_P-Cdc2";  // modifiers: UbE; isVersionOf kegg.pathway:spo04120 GO:0030163
  Rum1_Production: => R; k3; Rum1_Production is "Rum1 creation";
  Rum1_Deg_SPF: R => ; kp*Mass*R*SPF*(Kmp + R)^(-1); Rum1_Deg_SPF is "Rum1 degradation by SPF";  // modifiers: SPF; isVersionOf GO:0030163
  IE_Reaction: $IEB -> IE; IEB*ki*MPF*(IEB + Kmi)^(-1) + (-1*IE*kir*(IE + Kmir)^(-1)); IE_Reaction is "IE production & degradation";  // modifiers: MPF
  UbE_Reaction: $UbEB -> UbE; IE*ku*UbEB*(Kmu + UbEB)^(-1) + (-1*kur*UbE*(Kmur + UbE)^(-1)); UbE_Reaction is "UbE production & degradation";  // modifiers: IE
  UbE2_Reaction: $UbE2B -> UbE2; ku2*MPF*UbE2B*(Kmu2 + UbE2)^(-1) + (-1*kur2*UbE2*(Kmur2 + UbE2)^(-1)); UbE2_Reaction is "UbE2 production & degradation";  // modifiers: MPF
  Wee1_Reaction: $Wee1B -> Wee1; kwr*Wee1B*(Kmwr + Wee1B)^(-1) + (-1*kw*MPF*Wee1*(Kmw + Wee1)^(-1)); Wee1_Reaction is "Wee1 production & degradation";  // modifiers: MPF
  Cdc25_Reaction: $Cdc25B -> Cdc25; Cdc25B*kc*MPF*(Cdc25B + Kmc)^(-1) + (-1*Cdc25*kcr*(Cdc25 + Kmcr)^(-1)); Cdc25_Reaction is "Cdc25 production & degradation";  // modifiers: MPF

  // Events:
  Start: at (60) after (SPF >= 0.1): kp = kp*2^(-1); Start is "S-Phase Start";  // GO:0045750
  Division: at (UbE <= 0.1): kp = 2*kp, Mass = Mass*2^(-1); Division is "Cell Division";  // GO:0051301

  // Unit definitions:
  unit time = 60 second; time is "minutes";
end
