// SBML level 2 version 4

model Kummer2000_CalciumSpiking()
  // This model is from the article:
  // Switching from simple to complex oscillations in calcium signaling.
  // Kummer U, Olsen LF, Dixon CJ, Green AK, Bornberg-Bauer E, Baier G. Biophys J.2000 Sep;79(3):1188-95. 10968983,
  // Abstract:
  // We present a new model for calcium oscillations based on experiments in hepatocytes. The model considers feedback inhibition on the initial agonist receptor complex by calcium and activated phospholipase C, as well as receptor type-dependent self-enhanced behavior of the activated G(alpha) subunit. It is able to show simple periodic oscillations and periodic bursting, and it is the first model to display chaotic bursting in response to agonist stimulations. Moreover, our model offers a possible explanation for the differences in dynamic behavior observed in response to different agonists in hepatocytes.

  // Compartments:
  compartment cytoplasm = 1;
  compartment ER = 1;

  // Species:
  species a in cytoplasm = 0.01; a is "G-alpha";
  species b in cytoplasm = 0.01/cytoplasm; b is "PLC";
  species c in cytoplasm = 0.01/cytoplasm; c is "Calcium-Cyt";
  species d in ER = 20/ER; d is "Calcium-ER";

  // Parameters:
  k1 = 0.09;
  k2 = 1.3;
  k3 = 0.64;
  K4 = 0.19;
  k5 = 4.88;
  K6 = 1.18;
  k7 = 2.08;
  k8 = 32.24;
  K9 = 29.09;
  k10 = 5;
  K11 = 2.67;
  k12 = 0.7;
  k13 = 13.58;
  k14 = 153;
  K15 = 0.16;
  k16 = 4.85;
  K17 = 0.05;

  // Rate rules:
  a' = k1 + k2*a - k3*a*b/(a + K4) - k5*a*c/(a + K6);
  b' = k7*a - k8*b/(b + K9);
  c' = k10*c*b*d/(d + K11) + k12*b + k13*a - k14*c/(c + K15) - k16*c/(c + K17);
  d' = -k10*c*b*d/(d + K11) + k16*c/(c + K17);
end
