// SBML level 2 version 4

function drug_flux__irreversible(ki, xi, Inp, P)
  ki*(xi*Inp - P);
end
drug_flux__irreversible is "drug flux (irreversible)";

function IBMX_flux(ki, Inp, P)
  ki*(Inp - P);
end

function function_1__reversible(S, P, kf, Inp, KD)
  S*kf*Inp - P*KD*kf;
end
function_1__reversible is "function 1 (reversible)";

function phosphorylation__reversible(kp, S, A, kdp, P)
  kp*S*A - kdp*P;
end
phosphorylation__reversible is "phosphorylation (reversible)";

function function_2__reversible(kf, xi, M, S, xi_KD, P, KD)
  kf*xi*M*S - kf*xi*KD*xi_KD*P;
end
function_2__reversible is "function 2 (reversible)";

function function_3__reversible(kf, M, S, KD, P)
  kf*M*S - kf*KD*P;
end
function_3__reversible is "function 3 (reversible)";

function cAMP_degradation(kdeg_cAMP, KD_IBMX, IBMX, PDE, xi_pPDE, pPDE, S)
  kdeg_cAMP*KD_IBMX/(KD_IBMX + IBMX)*(PDE + xi_pPDE*pPDE)*S;
end

function Mass_action__two_parameters__irreversible(k1, k2, S)
  k1*k2*S;
end
Mass_action__two_parameters__irreversible is "Mass action, two parameters (irreversible)";

function function_4__irreversible(kf, xi, KD, xi_KD, S)
  kf*xi*KD*xi_KD*S;
end
function_4__irreversible is "function 4 (irreversible)";

function cAMP_production__irreversible(ks_AC_cAMP, AC, xi_pAC, pAC, xi_AC_cAMP_Fsk, AC_Fsk, pAC_Fsk)
  ks_AC_cAMP*(AC + xi_pAC*pAC) + ks_AC_cAMP*xi_AC_cAMP_Fsk*(AC_Fsk + xi_pAC*pAC_Fsk);
end
cAMP_production__irreversible is "cAMP production (irreversible)";

function function_5__irreversible(kf, xi, S1, S2)
  kf*xi*S1*S2;
end
function_5__irreversible is "function 5 (irreversible)";

model PKA__cycle()
  // PKA cycle

  // Compartments:
  compartment cytosol = 1;  // GO:0005829

  // Species:
  species pAC in cytosol = 0;  // isVersionOf uniprot:D4A3N4
  species AC_Fsk in cytosol = 0;  // hasPart uniprot:D4A3N4 chembl.compound:CHEMBL52606
  species pAC_Fsk in cytosol = 0;  // hasVersion uniprot:D4A3N4; hasPart chembl.compound:CHEMBL52606
  species cAMP in cytosol = 0;  // CHEBI:17489
  species Csub in cytosol = 0;  // uniprot:Q05759
  species Csub_H89 in cytosol = 0;  // hasPart uniprot:Q05759 chembl.compound:CHEMBL104264
  species RIIp_C_2 in cytosol = RII2_total;  // hasPart uniprot:Q05759 uniprot:P12369
  species RIIp_cAMP_C_2 in cytosol = 0;  // hasPart uniprot:Q05759 CHEBI:17489; hasVersion uniprot:P12369
  species RIIp_cAMP_2 in cytosol = 0;  // hasVersion uniprot:P12369; hasPart CHEBI:17489
  species Sp8_Br_cAMPS in cytosol = 0;  // pubchem.compound:9802422
  species Rp8_Br_cAMPS in cytosol = 0;  // pubchem.compound:16760258
  species Rp8_pCPT_cAMPS in cytosol = 0;  // pubchem.compound:101244611
  species Rp_cAMPS in cytosol = 0;  // pubchem.compound:16072219
  species RIIp_Rp8_Br_cAMPS_C_2 in cytosol = 0;  // hasPart uniprot:Q05759 pubchem.compound:16760258; hasVersion uniprot:P12369
  species RIIp_Rp8_pCPT_cAMPS_C_2 in cytosol = 0;  // hasPart uniprot:Q05759 pubchem.compound:101244611; hasVersion uniprot:P12369
  species RIIp_Rp_cAMPS_C_2 in cytosol = 0;  // hasPart uniprot:Q05759 pubchem.compound:16072219; hasVersion uniprot:P12369
  species RIIp_Sp8_Br_cAMPS_C_2 in cytosol = 0;  // hasPart uniprot:Q05759 pubchem.compound:9802422; isVersionOf uniprot:P12369
  species RIIp_Sp8_Br_cAMPS_2 in cytosol = 0;  // hasVersion uniprot:P12369; hasPart pubchem.compound:9802422
  species RIIp_2 in cytosol = 0;  // isVersionOf uniprot:P12369
  species RII_2 in cytosol = 0;  // uniprot:P12369
  species IBMX in cytosol = 0;  // chembl.compound:CHEMBL275084
  species PDE in cytosol = PDE_total;  // uniprot:Q9GQU6
  species pPDE in cytosol = 0;  // isVersionOf uniprot:Q9GQU6
  species AC in cytosol = AC_total;  // chembl.compound:CHEMBL52606
  species RII_C_2 in cytosol = 0;  // hasPart uniprot:Q05759 uniprot:P12369

  // Parameters:
  Fsk = 0;  // chembl.compound:CHEMBL52606
  DAMGO = 0;  // chembl.compound:CHEMBL38874
  Fentanyl = 0;  // chembl.compound:CHEMBL596
  NTX = 0;  // CHEBI:7465
  CTOP = 0;  // pubchem.compound:90479805
  IBMXex = 0;  // chembl.compound:CHEMBL275084
  DMSO = 0;  // chembl.compound:CHEMBL504
  H89 = 0;  // chembl.compound:CHEMBL104264
  Rp8_Br_cAMPS_pAB = 0;
  Rp8_pCPT_cAMPS_pAB = 0;
  Rp_cAMPS_pAB = 0;
  fourABnOH = 0;
  kf_Fsk = 0;
  KD_Fsk = 0;
  kp_AC = 0;
  kdp_AC = 0;
  kf_cAMP = 0;
  kf_RIIp_cAMP_C_2__RIIp_2 = 0;
  kdeg_cAMP = 0;
  KD_IBMX = 0;
  xi_pPDE = 0;
  KD_cAMP = 0;
  xi_b_Sp8_Br_cAMPS = 0;
  xi_KD_Sp8_Br_cAMPS = 0;
  AC_total = 0;  // uniprot:D4A3N4
  RII2_total = 0;  // uniprot:P12369
  PDE_total = 0;  // uniprot:Q9GQU6
  Sp8_Br_cAMPS_AM = 0;
  fiveHT_time_0 = 0;
  fiveHT_level_0 = 0;
  rel_open = 0;
  kf_RII_C_2__RII_2 = 0;
  kf_RII_2__RII_C_2 = 0;
  xi_rel_open = 0;

  // Assignment rules:
  Calpha := 2*(Csub + Csub_H89) + 2*rel_open*(RIIp_C_2 + RIIp_Rp8_Br_cAMPS_C_2 + RIIp_Rp8_pCPT_cAMPS_C_2 + RIIp_Rp_cAMPS_C_2) + 2*(rel_open + xi_rel_open*(1 - rel_open))*(RIIp_cAMP_C_2 + RIIp_Sp8_Br_cAMPS_C_2);
  fiveHT := piecewise(0, time < fiveHT_time_0, fiveHT_level_0);
  pRII_western := 2*RII_2 + 2*RIIp_2 + 2*RIIp_C_2 + 2*RIIp_cAMP_C_2 + 2*RIIp_cAMP_2 + 2*RIIp_Sp8_Br_cAMPS_2 + 2*RIIp_Sp8_Br_cAMPS_C_2 + 2*RIIp_Rp8_Br_cAMPS_C_2 + 2*RIIp_Rp8_pCPT_cAMPS_C_2 + 2*RIIp_Rp_cAMPS_C_2;
  pRII := 2*RII_2 + 2*RIIp_2 + 2*RIIp_cAMP_2 + 2*RIIp_Sp8_Br_cAMPS_2 + rel_open*(2*RIIp_C_2 + 2*RIIp_cAMP_C_2 + 2*RIIp_Rp8_Br_cAMPS_C_2 + 2*RIIp_Rp8_pCPT_cAMPS_C_2 + 2*RIIp_Rp_cAMPS_C_2 + 2*RIIp_Rp8_Br_cAMPS_C_2);

  // Reactions:
  AC___AC_Fsk: AC -> AC_Fsk; cytosol*function_1__reversible(AC, AC_Fsk, kf_Fsk, Fsk, KD_Fsk); AC___AC_Fsk is "AC = AC_Fsk";  // hasPart GO:0065003 GO:0032984
  AC___pAC: AC -> pAC; cytosol*phosphorylation__reversible(kp_AC, AC, Csub, kdp_AC, pAC); AC___pAC is "AC = pAC";  // modifiers: Csub; hasPart GO:0006468 GO:0006470
  pAC___pAC_Fsk: pAC -> pAC_Fsk; cytosol*function_1__reversible(pAC, pAC_Fsk, kf_Fsk, Fsk, KD_Fsk); pAC___pAC_Fsk is "pAC = pAC_Fsk";  // hasPart GO:0065003; GO:0032984
  Sp8_Br_cAMPS_0: => Sp8_Br_cAMPS; cytosol*drug_flux__irreversible(Sp8_Br_cAMPS_0_ki, Sp8_Br_cAMPS_0_xi, Sp8_Br_cAMPS_AM, Sp8_Br_cAMPS);  // GO:0055085
    Sp8_Br_cAMPS_0_ki = 0.1; Sp8_Br_cAMPS_0_xi = 0.1;
  Rp8_Br_cAMPS_0: => Rp8_Br_cAMPS; cytosol*drug_flux__irreversible(Rp8_Br_cAMPS_0_ki, Rp8_Br_cAMPS_0_xi, Rp8_Br_cAMPS_pAB, Rp8_Br_cAMPS);  // GO:0055085
    Rp8_Br_cAMPS_0_ki = 0.1; Rp8_Br_cAMPS_0_xi = 0.1;
  Rp8_pCPT_cAMPS_0: => Rp8_pCPT_cAMPS; cytosol*drug_flux__irreversible(Rp8_pCPT_cAMPS_0_ki, Rp8_pCPT_cAMPS_0_xi, Rp8_pCPT_cAMPS_pAB, Rp8_pCPT_cAMPS);  // GO:0055085
    Rp8_pCPT_cAMPS_0_ki = 0.1; Rp8_pCPT_cAMPS_0_xi = 0.1;
  Rp_cAMPS_0: => Rp_cAMPS; cytosol*drug_flux__irreversible(Rp_cAMPS_0_ki, Rp_cAMPS_0_xi, Rp_cAMPS_pAB, Rp_cAMPS);  // GO:0055085
    Rp_cAMPS_0_ki = 0.1; Rp_cAMPS_0_xi = 0.1;
  IBMX_0: => IBMX; cytosol*IBMX_flux(IBMX_0_ki, IBMXex, IBMX);  // GO:0055085
    IBMX_0_ki = 0.1;
  Csub___Csub_H89: Csub -> Csub_H89; cytosol*function_1__reversible(Csub, Csub_H89, Csub___Csub_H89_kf, H89, Csub___Csub_H89_KD); Csub___Csub_H89 is "Csub = Csub_H89";  // GO:0065003 GO:0032984
    Csub___Csub_H89_kf = 0.1; Csub___Csub_H89_KD = 0.1;
  AC_Fsk___pAC_Fsk: AC_Fsk -> pAC_Fsk; cytosol*phosphorylation__reversible(kp_AC, AC_Fsk, Csub, kdp_AC, pAC_Fsk); AC_Fsk___pAC_Fsk is "AC_Fsk = pAC_Fsk";  // modifiers: Csub; hasPart GO:0006470 GO:0006468
  RIIp_C_2___RIIp_Rp8_Br_cAMPS_C_2: RIIp_C_2 -> RIIp_Rp8_Br_cAMPS_C_2; cytosol*function_2__reversible(kf_cAMP, RIIp_C_2___RIIp_Rp8_Br_cAMPS_C_2_xi, Rp8_Br_cAMPS, RIIp_C_2, RIIp_C_2___RIIp_Rp8_Br_cAMPS_C_2_xi_KD, RIIp_Rp8_Br_cAMPS_C_2, KD_cAMP); RIIp_C_2___RIIp_Rp8_Br_cAMPS_C_2 is "RIIp_C_2 = RIIp_Rp8_Br_cAMPS_C_2";  // modifiers: Rp8_Br_cAMPS; hasPart GO:0032984; GO:0065003 GO:0010737
    RIIp_C_2___RIIp_Rp8_Br_cAMPS_C_2_xi = 0.1; RIIp_C_2___RIIp_Rp8_Br_cAMPS_C_2_xi_KD = 0.1;
  RIIp_C_2___RIIp_Rp8_pCPT_cAMPS_C_2: RIIp_C_2 -> RIIp_Rp8_pCPT_cAMPS_C_2; cytosol*function_2__reversible(kf_cAMP, RIIp_C_2___RIIp_Rp8_pCPT_cAMPS_C_2_xi, Rp8_pCPT_cAMPS, RIIp_C_2, RIIp_C_2___RIIp_Rp8_pCPT_cAMPS_C_2_xi_KD, RIIp_Rp8_pCPT_cAMPS_C_2, KD_cAMP); RIIp_C_2___RIIp_Rp8_pCPT_cAMPS_C_2 is "RIIp_C_2 = RIIp_Rp8_pCPT_cAMPS_C_2";  // modifiers: Rp8_pCPT_cAMPS; hasPart GO:0032984; GO:0065003 GO:0010737
    RIIp_C_2___RIIp_Rp8_pCPT_cAMPS_C_2_xi = 0.1; RIIp_C_2___RIIp_Rp8_pCPT_cAMPS_C_2_xi_KD = 0.1;
  RIIp_C_2___RIIp_Rp_cAMPS_C_2: RIIp_C_2 -> RIIp_Rp_cAMPS_C_2; cytosol*function_2__reversible(kf_cAMP, RIIp_C_2___RIIp_Rp_cAMPS_C_2_xi, Rp_cAMPS, RIIp_C_2, RIIp_C_2___RIIp_Rp_cAMPS_C_2_xi_KD, RIIp_Rp_cAMPS_C_2, KD_cAMP); RIIp_C_2___RIIp_Rp_cAMPS_C_2 is "RIIp_C_2 = RIIp_Rp_cAMPS_C_2";  // modifiers: Rp_cAMPS; GO:0065003 GO:0032984 GO:0010737
    RIIp_C_2___RIIp_Rp_cAMPS_C_2_xi = 0.1; RIIp_C_2___RIIp_Rp_cAMPS_C_2_xi_KD = 0.1;
  RIIp_C_2___RIIp_Sp8_Br_cAMPS_C_2: RIIp_C_2 -> RIIp_Sp8_Br_cAMPS_C_2; cytosol*function_2__reversible(kf_cAMP, xi_b_Sp8_Br_cAMPS, Sp8_Br_cAMPS, RIIp_C_2, KD_cAMP, RIIp_Sp8_Br_cAMPS_C_2, xi_KD_Sp8_Br_cAMPS); RIIp_C_2___RIIp_Sp8_Br_cAMPS_C_2 is "RIIp_C_2 = RIIp_Sp8_Br_cAMPS_C_2";  // modifiers: Sp8_Br_cAMPS; hasPart GO:0032984; GO:0065003 GO:0010737
  RIIp_Sp8_Br_cAMPS_C_2____RIIp_Sp8_Br_cAMPS_2___Csub: RIIp_Sp8_Br_cAMPS_C_2 => RIIp_Sp8_Br_cAMPS_2 + Csub; cytosol*kf_RIIp_cAMP_C_2__RIIp_2*RIIp_Sp8_Br_cAMPS_C_2; RIIp_Sp8_Br_cAMPS_C_2____RIIp_Sp8_Br_cAMPS_2___Csub is "RIIp_Sp8_Br_cAMPS_C_2 -> RIIp_Sp8_Br_cAMPS_2 + Csub";  // GO:0032984 GO:0010737
  RIIp_cAMP_C_2_____RIIp_cAMP_2___Csub: RIIp_cAMP_C_2 => RIIp_cAMP_2 + Csub; cytosol*kf_RIIp_cAMP_C_2__RIIp_2*RIIp_cAMP_C_2; RIIp_cAMP_C_2_____RIIp_cAMP_2___Csub is "RIIp_cAMP_C_2 -> RIIp_cAMP_2 + Csub";  // GO:0032984 GO:0010737
  RIIp_C_2_____RIIp_2___Csub: RIIp_C_2 => RIIp_2 + Csub; cytosol*Mass_action__two_parameters__irreversible(kf_RII_C_2__RII_2, RIIp_C_2_____RIIp_2___Csub_k2, RIIp_C_2); RIIp_C_2_____RIIp_2___Csub is "RIIp_C_2 -> RIIp_2 + Csub";  // isPartOf GO:0010737; GO:0043624
    RIIp_C_2_____RIIp_2___Csub_k2 = 0.1;
  RIIp_2____RII_2: RIIp_2 => RII_2; cytosol*RIIp_2____RII_2_k1*RIIp_2; RIIp_2____RII_2 is "RIIp_2 -> RII_2";  // GO:0006470
    RIIp_2____RII_2_k1 = 0.1;
  PDE___pPDE: PDE -> pPDE; cytosol*function_3__reversible(PDE___pPDE_kf, Csub, PDE, PDE___pPDE_KD, pPDE); PDE___pPDE is "PDE = pPDE";  // modifiers: Csub; GO:0006468 GO:0006470
    PDE___pPDE_kf = 0.1; PDE___pPDE_KD = 0.1;
  RIIp_C_2___RIIp_cAMP_C_2: RIIp_C_2 -> RIIp_cAMP_C_2; cytosol*function_3__reversible(kf_cAMP, cAMP, RIIp_C_2, KD_cAMP, RIIp_cAMP_C_2); RIIp_C_2___RIIp_cAMP_C_2 is "RIIp_C_2 = RIIp_cAMP_C_2";  // modifiers: cAMP; hasPart GO:0006198; isPartOf GO:0010737
  cAMP__: cAMP => ; cytosol*cAMP_degradation(kdeg_cAMP, KD_IBMX, IBMX, PDE, xi_pPDE, pPDE, cAMP); cAMP__ is "cAMP ->";  // modifiers: IBMX, PDE, pPDE; GO:0006198; isPartOf GO:0010737
  RIIp_cAMP_C_2____RIIp_C_2: RIIp_cAMP_C_2 => RIIp_C_2; cytosol*cAMP_degradation(kdeg_cAMP, KD_IBMX, IBMX, PDE, xi_pPDE, pPDE, RIIp_cAMP_C_2); RIIp_cAMP_C_2____RIIp_C_2 is "RIIp_cAMP_C_2 -> RIIp_C_2";  // modifiers: IBMX, PDE, pPDE; GO:0006198; isPartOf GO:0010737
  RIIp_cAMP_2____RIIp_2: RIIp_cAMP_2 => RIIp_2; cytosol*cAMP_degradation(kdeg_cAMP, KD_IBMX, IBMX, PDE, xi_pPDE, pPDE, RIIp_cAMP_2); RIIp_cAMP_2____RIIp_2 is "RIIp_cAMP_2 -> RIIp_2";  // modifiers: IBMX, PDE, pPDE; GO:0006198; isPartOf GO:0010737
  RIIp_cAMP_2____RIIp_2__2: RIIp_cAMP_2 => RIIp_2; cytosol*Mass_action__two_parameters__irreversible(kf_cAMP, KD_cAMP, RIIp_cAMP_2); RIIp_cAMP_2____RIIp_2__2 is "RIIp_cAMP_2 -> RIIp_2, 2";  // GO:0006198; isPartOf GO:0010737
  RIIp_Sp8_Br_cAMPS_2____RIIp_2: RIIp_Sp8_Br_cAMPS_2 => RIIp_2; cytosol*function_4__irreversible(kf_cAMP, xi_b_Sp8_Br_cAMPS, KD_cAMP, xi_KD_Sp8_Br_cAMPS, RIIp_Sp8_Br_cAMPS_2); RIIp_Sp8_Br_cAMPS_2____RIIp_2 is "RIIp_Sp8_Br_cAMPS_2 -> RIIp_2";  // GO:0032984
  ___cAMP: => cAMP; cytosol*cAMP_production__irreversible(ks_AC_cAMP, AC, xi_pAC, pAC, xi_AC_cAMP_Fsk, AC_Fsk, pAC_Fsk); ___cAMP is "-> cAMP";  // modifiers: AC, pAC, AC_Fsk, pAC_Fsk; isPartOf GO:0010737; GO:0006171
    ks_AC_cAMP = 0.1; xi_pAC = 0.1; xi_AC_cAMP_Fsk = 0.1;
  RII_2___Csub____RII_C_2: RII_2 + Csub => RII_C_2; cytosol*kf_RII_2__RII_C_2*RII_2*Csub; RII_2___Csub____RII_C_2 is "RII_2 + Csub -> RII_C_2";  // isPartOf GO:0010737; GO:0034236 GO:0065003
  RII_C_2____RII_2___Csub: RII_C_2 => RII_2 + Csub; cytosol*kf_RII_C_2__RII_2*RII_C_2; RII_C_2____RII_2___Csub is "RII_C_2 -> RII_2 + Csub";  // isPartOf GO:0010737; GO:0043624
  RIIp_2___Csub____RIIp_C_2: RIIp_2 + Csub => RIIp_C_2; cytosol*function_5__irreversible(kf_RII_2__RII_C_2, RIIp_2___Csub____RIIp_C_2_xi, RIIp_2, Csub); RIIp_2___Csub____RIIp_C_2 is "RIIp_2 + Csub -> RIIp_C_2";  // isPartOf GO:0010737; GO:0034236
    RIIp_2___Csub____RIIp_C_2_xi = 0.1;
  RII_C_2___RIIp_C_2: RII_C_2 -> RIIp_C_2; cytosol*(RII_C_2___RIIp_C_2_k1*RII_C_2 - RII_C_2___RIIp_C_2_k2*RIIp_C_2); RII_C_2___RIIp_C_2 is "RII_C_2 = RIIp_C_2";  // GO:0006470; isPartOf GO:0010737
    RII_C_2___RIIp_C_2_k1 = 0.1; RII_C_2___RIIp_C_2_k2 = 0.1;

  // Unit definitions:
  unit volume = 1e-12 litre;
  unit time = 60 second;
  unit substance = 1e-3 mole;
end
