// SBML level 3 version 1

model dupreez5()
  // model units - substance: mmol, time: min, volume: L, extent: mM

  // Compartments:
  compartment default_compartment = 1;

  // Species:
  species ACE in default_compartment = 0.02011;  // obo.chebi:CHEBI15343 kegg.compound:C00084
  species ACEo in default_compartment = 0.0197959;  // obo.chebi:CHEBI15343 kegg.compound:C00084
  species ADP in default_compartment;
  species AMP in default_compartment = 0.0488473;  // obo.chebi:CHEBI16027 kegg.compound:C00020
  species ATP in default_compartment = 3.43522;  // obo.chebi:CHEBI15422 kegg.compound:C00002
  species BPG in default_compartment = 0.000298188;  // obo.chebi:28907 kegg.compound:C00236
  species CNreactor in default_compartment = 5.49166;  // obo.chebi:CHEBI17514 kegg.compound:C00177
  species F16P in default_compartment = 4.6884;  // obo.chebi:16905 kegg.compound:C00354
  species F6P in default_compartment = 1.23131;  // kegg.compound:C00085 obo.chebi:15946
  species G3P in default_compartment = 0.821754;  // kegg.compound:C00093 obo.chebi:CHEBI15978
  species G6P in default_compartment = 4.45563;  // kegg.compound:C00092 obo.chebi:17665
  species GLCi in default_compartment = 0.0198889;  // kegg.compound:C00293 obo.chebi:CHEBI17234
  species GLCreactor in default_compartment = 14.0826;  // kegg.compound:C00293 obo.chebi:CHEBI17234
  species NAD in default_compartment;
  species NADH in default_compartment = 0.325524;  // obo.chebi:16908 kegg.compound:C00004
  species P2G in default_compartment = 0.0125652;  // kegg.compound:C00631 obo.chebi:17835
  species P3G in default_compartment = 0.112322;  // kegg.compound:C00197 obo.chebi:17794
  species PEP in default_compartment = 0.0197931;  // obo.chebi:18021 kegg.compound:C00074
  species PYR in default_compartment = 1.68245;  // obo.chebi:15361 kegg.compound:C00022
  species TRIO in default_compartment = 2.44568;  // obo.chebi:CHEBI15978 obo.chebi:CHEBI17138 kegg.compound:C00093 kegg.compound:C00661

  // Parameters:
  ACEmedium = 0;
  AKopt = 0.538823;
  AXPsum = 4.1;
  CNmedium = 5.6;
  CPFKAMP = 0.06190663;
  CPFKATP = 4.119271;
  CPFKF16BP = 0.5087295;
  CPFKF26BP = 0.01664462;
  CiPFKATP = 133.9976;
  ETOH = 50;
  EXTERNAL = 0;
  F26BP = 0.02;
  GLCmedium = 30;
  KATPASE = 38.3152;
  KGLYCOGEN = 0.657953;
  KPFKAMP = 0.09082401;
  KPFKF16BP = 0.08673033;
  KPFKF26BP = 0.0008094383;
  KSUCC = 15.5244;
  KTREHALOSE = 0.355327;
  KeqADH = 6.9e-5;
  KeqAK = 0.45;
  KeqALD = 0.069;
  KeqENO = 6.7;
  KeqG3PDH = 4300;
  KeqGAPDH = 0.005626391;
  KeqGLK = 3800;
  KeqGLT = 1;
  KeqPGI = 0.314;
  KeqPGK = 3200;
  KeqPGM = 0.19;
  KeqPYK = 6500;
  KeqTPI = 0.045;
  KiADHACE = 1.102694;
  KiADHETOH = 87.51977;
  KiADHNAD = 0.9940869;
  KiADHNADH = 0.02661121;
  KiPFKATP = 0.672262;
  KmADHACE = 1.086405;
  KmADHETOH = 17.87347;
  KmADHNAD = 0.1731518;
  KmADHNADH = 0.1060281;
  KmALDDHAP = 2.352796;
  KmALDF16P = 0.2899786;
  KmALDGAP = 2.03508;
  KmALDGAPi = 10.10501;
  KmATP = 0.2267754;
  KmENOP2G = 0.03842988;
  KmENOPEP = 0.4871812;
  KmG3PAG3P = 4.367796;
  KmG3PAPhi = 0.7841451;
  KmG3PDHADP = 1.667427;
  KmG3PDHATP = 0.4770416;
  KmG3PDHDHAP = 0.4349458;
  KmG3PDHF16P = 5.393838;
  KmG3PDHG3P = 0.9899047;
  KmG3PDHNAD = 0.864231;
  KmG3PDHNADH = 0.02486643;
  KmGAPDHBPG = 0.01055013;
  KmGAPDHGAP = 0.1260141;
  KmGAPDHNAD = 0.08771569;
  KmGAPDHNADH = 0.05609163;
  KmGLKADP = 0.2630927;
  KmGLKATP = 0.1229529;
  KmGLKG6P = 29.90472;
  KmGLKGLCi = 0.07054484;
  KmGLTGLCi = 1.260196;
  KmGLTGLCo = 1.147811;
  KmPDCPYR = 2.71686;
  KmPFKATP = 0.6393825;
  KmPFKF6P = 0.1364425;
  KmPGIF6P = 0.2888984;
  KmPGIG6P = 1.31112;
  KmPGKADP = 0.1952352;
  KmPGKATP = 0.3071786;
  KmPGKBPG = 0.003016805;
  KmPGKP3G = 0.5153834;
  KmPGMP2G = 0.08169727;
  KmPGMP3G = 1.165312;
  KmPYKADP = 0.4232878;
  KmPYKATP = 1.679326;
  KmPYKPEP = 0.1146875;
  KmPYKPYR = 21.28758;
  L0 = 0.7444282;
  NADSUM = 1;
  Phi = 1.204703;
  VmADH = 329.311;
  VmALD = 115.755;
  VmENO = 276.012;
  VmG3PA = 28.7586;
  VmG3PDH = 19.8677;
  VmGAPDHf = 279.717;
  VmGLK = 229.682;
  VmGLT = 43.9573;
  VmPDC = 209.1;
  VmPFK = 127.541;
  VmPGI = 274.364;
  VmPGK = 797.961;
  VmPGM = 1591.56;
  VmPYK = 1223.19;
  alpha = 0.91;
  gR = 3.476513;
  k0 = 0.05;
  kACEt = 1431;
  kLACTO = 0.09;
  nATP = 1;
  nPDC = 2.380189;
  optACEt = 0.566679;
  optLACTO = 0.566679;
  yvol = 50;

  // Assignment rules:
  ADP := AXPsum - AMP - ATP;
  NAD := NADSUM - NADH;

  // Reactions:
  v_ACEinflow: -> ACEo; k0*(ACEmedium - ACEo);
  v_ACEt: ACE -> 0.02 ACEo; optACEt*kACEt*(ACE - ACEo);
  v_ADH: ACE + NADH -> ; -(VmADH*(ETOH*NAD - ACE*NADH/KeqADH)/(KiADHNAD*KmADHETOH*(1 + ETOH*KmADHNAD/(KiADHNAD*KmADHETOH) + KmADHNADH*ACE/(KiADHNADH*KmADHACE) + NAD/KiADHNAD + ETOH*NAD/(KiADHNAD*KmADHETOH) + ETOH*ACE*NAD/(KiADHACE*KiADHNAD*KmADHETOH) + KmADHNADH*ACE*NAD/(KiADHNAD*KiADHNADH*KmADHACE) + NADH/KiADHNADH + ETOH*KmADHNAD*NADH/(KiADHNAD*KiADHNADH*KmADHETOH) + ACE*NADH/(KiADHNADH*KmADHACE) + ETOH*ACE*NADH/(KiADHETOH*KiADHNADH*KmADHACE))));  // modifiers: NAD; kegg.reaction:R00754
  v_AK: -> AMP + ATP; 133.333*AKopt*(ADP^2 - AMP*ATP/KeqAK);  // modifiers: ADP
  v_ALD: F16P -> 2 TRIO; VmALD*(F16P - KeqTPI*TRIO^2/(KeqALD*(1 + KeqTPI)^2))/(KmALDF16P*(1 + F16P/KmALDF16P + TRIO/((1 + KeqTPI)*KmALDDHAP) + KeqTPI*TRIO/((1 + KeqTPI)*KmALDGAP) + KeqTPI*F16P*TRIO/((1 + KeqTPI)*KmALDF16P*KmALDGAPi) + KeqTPI*TRIO^2/((1 + KeqTPI)^2*KmALDDHAP*KmALDGAP)));  // kegg.reaction:R01068
  v_ATP: ATP -> ; KATPASE*ATP^nATP/(KmATP^nATP + ATP^nATP);  // obo.go:0006200
  v_CNinflow: -> CNreactor; k0*(CNmedium - CNreactor);
  v_ENO: P2G -> PEP; VmENO*(P2G - PEP/KeqENO)/(KmENOP2G*(1 + P2G/KmENOP2G + PEP/KmENOPEP));  // kegg.reaction:R00658
  v_G3PA: G3P -> ; VmG3PA*G3P/(KmG3PAG3P*(1 + Phi/KmG3PAPhi)*(1 + G3P/KmG3PAG3P));
  v_G3PDH: NADH + TRIO -> G3P; VmG3PDH*(-(G3P*NAD/KeqG3PDH) + NADH*TRIO/(1 + KeqTPI))/(KmG3PDHDHAP*KmG3PDHNADH*(1 + ADP/KmG3PDHADP + ATP/KmG3PDHATP + F16P/KmG3PDHF16P)*(1 + NAD/KmG3PDHNAD + NADH/KmG3PDHNADH)*(1 + G3P/KmG3PDHG3P + TRIO/((1 + KeqTPI)*KmG3PDHDHAP)));  // modifiers: ATP, F16P, NAD, ADP
  v_GAPDH: TRIO -> BPG + NADH; (-(VmGAPDHf*BPG*NADH/(KeqGAPDH*KmGAPDHGAP*KmGAPDHNAD)) + KeqTPI*VmGAPDHf*NAD*TRIO/((1 + KeqTPI)*KmGAPDHGAP*KmGAPDHNAD))/((1 + NAD/KmGAPDHNAD + NADH/KmGAPDHNADH)*(1 + BPG/KmGAPDHBPG + KeqTPI*TRIO/((1 + KeqTPI)*KmGAPDHGAP)));  // modifiers: NAD; kegg.reaction:R01061
  v_GLCinflow: -> GLCreactor; k0*(GLCmedium - GLCreactor);
  v_GLK: ATP + GLCi -> G6P; VmGLK*(-(ADP*G6P/KeqGLK) + ATP*GLCi)/(KmGLKATP*KmGLKGLCi*(1 + ADP/KmGLKADP + ATP/KmGLKATP)*(1 + G6P/KmGLKG6P + GLCi/KmGLKGLCi));  // modifiers: ADP; kegg.reaction:R00299
  v_GLT: 0.02 GLCreactor -> GLCi; VmGLT*(-(GLCi/KeqGLT) + GLCreactor)/(KmGLTGLCo*(1 + GLCi/KmGLTGLCi + GLCreactor/KmGLTGLCo + alpha*GLCi*GLCreactor/(KmGLTGLCi*KmGLTGLCo)));  // obo.go:0015758
  v_GLYCO: ATP + G6P -> ; KGLYCOGEN*ATP*G6P;
  v_LACTO: ACEo + CNreactor -> ; optLACTO*kLACTO*ACEo*CNreactor;
  v_PDC: PYR -> ACE; VmPDC*PYR^nPDC/(KmPDCPYR^nPDC*(1 + PYR^nPDC/KmPDCPYR^nPDC));  // kegg.reaction:R00224
  v_PFK: ATP + F6P -> F16P; gR*VmPFK*ATP*F6P*(1 + ATP/KmPFKATP + F6P/KmPFKF6P + gR*ATP*F6P/(KmPFKATP*KmPFKF6P))/(KmPFKATP*KmPFKF6P*(L0*(1 + CPFKAMP*AMP/KPFKAMP)^2*(1 + CiPFKATP*ATP/KiPFKATP)^2*(1 + CPFKATP*ATP/KmPFKATP)^2*(1 + CPFKF26BP*F26BP/KPFKF26BP + CPFKF16BP*F16P/KPFKF16BP)^2/((1 + AMP/KPFKAMP)^2*(1 + ATP/KiPFKATP)^2*(1 + F26BP/KPFKF26BP + F16P/KPFKF16BP)^2) + (1 + ATP/KmPFKATP + F6P/KmPFKF6P + gR*ATP*F6P/(KmPFKATP*KmPFKF6P))^2));  // modifiers: AMP; kegg.reaction:R04779
  v_PGI: G6P -> F6P; VmPGI*(-(F6P/KeqPGI) + G6P)/(KmPGIG6P*(1 + F6P/KmPGIF6P + G6P/KmPGIG6P));  // kegg.reaction:R02740
  v_PGK: BPG -> ATP + P3G; VmPGK*(KeqPGK*ADP*BPG - ATP*P3G)/(KmPGKATP*KmPGKP3G*(1 + ADP/KmPGKADP + ATP/KmPGKATP)*(1 + BPG/KmPGKBPG + P3G/KmPGKP3G));  // modifiers: ADP; kegg.reaction:R01512
  v_PGM: P3G -> P2G; VmPGM*(-(P2G/KeqPGM) + P3G)/(KmPGMP3G*(1 + P2G/KmPGMP2G + P3G/KmPGMP3G));  // kegg.reaction:R01518
  v_PYK: PEP -> ATP + PYR; VmPYK*(ADP*PEP - ATP*PYR/KeqPYK)/(KmPYKADP*KmPYKPEP*(1 + ADP/KmPYKADP + ATP/KmPYKATP)*(1 + PEP/KmPYKPEP + PYR/KmPYKPYR));  // modifiers: ADP
  v_SUC: 2 ACE + 4 ATP -> 3 NADH; KSUCC*ACE;
  v_Treha: ATP + 2 G6P -> ; KTREHALOSE*ATP*G6P;

  // Unit definitions:
  unit mmol = 1e-3 mole;
  unit L = litre;
  unit min = 60 second;
  unit mM = 1e-3 mole / litre;
end
