// SBML level 3 version 1

model dupreez7()
  // model units - substance: mmol, time: min, volume: L, extent: mM

  // Compartments:
  compartment default_compartment = 1;

  // Species:
  species ACE in default_compartment = 0.03042169;  // obo.chebi:CHEBI15343 kegg.compound:C00084
  species ADP in default_compartment = 0.35536;
  species AMP in default_compartment = 0.04924864;  // obo.chebi:CHEBI16027 kegg.compound:C00020
  species ATP in default_compartment = 1.102802;  // obo.chebi:CHEBI15422 kegg.compound:C00002
  species BPG in default_compartment = 0.0002805742;  // obo.chebi:28907 kegg.compound:C00236
  species F16P in default_compartment = 6.699076;  // obo.chebi:16905 kegg.compound:C00354
  species F6P in default_compartment = 1.689339;  // kegg.compound:C00085 obo.chebi:15946
  species G3P in default_compartment = 1.114649;  // kegg.compound:C00093 obo.chebi:CHEBI15978
  species G6P in default_compartment = 7.742137;  // kegg.compound:C00092 obo.chebi:17665
  species GLCi in default_compartment = 0.03636903;  // kegg.compound:C00293 obo.chebi:CHEBI17234
  species NAD in default_compartment = 0.749071;  // obo.chebi:15846
  species NADH in default_compartment = 0.2410402;  // obo.chebi:16908 kegg.compound:C00004
  species P2G in default_compartment = 0.01934057;  // kegg.compound:C00631 obo.chebi:17835
  species P3G in default_compartment = 0.1732283;  // kegg.compound:C00197 obo.chebi:17794
  species PEP in default_compartment = 0.02715524;  // obo.chebi:18021 kegg.compound:C00074
  species PYR in default_compartment = 2.03585;  // obo.chebi:15361 kegg.compound:C00022
  species TRIO in default_compartment = 2.6999;  // obo.chebi:CHEBI15978 obo.chebi:CHEBI17138 kegg.compound:C00093 kegg.compound:C00661

  // Parameters:
  ACEwashin = 0.02036595;
  ADPmedium = 0.2751218;
  AKopt = 0.0158216;
  AMPmedium = 0.03990564;
  ATPmedium = 1.192383;
  BPGwashin = 6.72551e-5;
  CPFKAMP = 0.06190663;
  CPFKATP = 4.119271;
  CPFKF16BP = 0.5087295;
  CPFKF26BP = 0.01664462;
  CiPFKATP = 133.9976;
  ETOH = 50;
  EXTERNAL = 0;
  F16Pwashin = 8.024334;
  F26BP = 0.02;
  F6Pwashin = 0.4483646;
  G3Pwashin = 0.8852109;
  G6Pwashin = 2.198641;
  GLCmedium = 54.4256;
  KATPASE = 1.389953;
  KGLYCOGEN = 0.01931962;
  KPFKAMP = 0.09082401;
  KPFKF16BP = 0.08673033;
  KPFKF26BP = 0.0008094383;
  KSUCC = 0.4558465;
  KTREHALOSE = 0.01043355;
  KeqADH = 6.9e-5;
  KeqAK = 0.45;
  KeqALD = 0.069;
  KeqENO = 6.7;
  KeqG3PDH = 4300;
  KeqGAPDH = 0.005626391;
  KeqGLK = 3800;
  KeqPGI = 0.314;
  KeqPGK = 3200;
  KeqPGM = 0.19;
  KeqPYK = 6500;
  KeqTPI = 0.045;
  KiADHACE = 1.102694;
  KiADHETOH = 87.51977;
  KiADHNAD = 0.9940869;
  KiADHNADH = 0.02661121;
  KiPFKATP = 0.672262;
  KmADHACE = 1.086405;
  KmADHETOH = 17.87347;
  KmADHNAD = 0.1731518;
  KmADHNADH = 0.1060281;
  KmALDDHAP = 2.352796;
  KmALDF16P = 0.2899786;
  KmALDGAP = 2.03508;
  KmALDGAPi = 10.10501;
  KmATP = 0.1870074;
  KmENOP2G = 0.03842988;
  KmENOPEP = 0.4871812;
  KmG3PAG3P = 4.367796;
  KmG3PAPhi = 0.7841451;
  KmG3PDHADP = 1.667427;
  KmG3PDHATP = 0.4770416;
  KmG3PDHDHAP = 0.4349458;
  KmG3PDHF16P = 5.393838;
  KmG3PDHG3P = 0.9899047;
  KmG3PDHNAD = 0.864231;
  KmG3PDHNADH = 0.02486643;
  KmGAPDHBPG = 0.01055013;
  KmGAPDHGAP = 0.1260141;
  KmGAPDHNAD = 0.08771569;
  KmGAPDHNADH = 0.05609163;
  KmGLKADP = 0.2630927;
  KmGLKATP = 0.1229529;
  KmGLKG6P = 29.90472;
  KmGLKGLCi = 0.07054484;
  KmPDCPYR = 2.71686;
  KmPFKATP = 0.6393825;
  KmPFKF6P = 0.1364425;
  KmPGIF6P = 0.2888984;
  KmPGIG6P = 1.31112;
  KmPGKADP = 0.1952352;
  KmPGKATP = 0.3071786;
  KmPGKBPG = 0.003016805;
  KmPGKP3G = 0.5153834;
  KmPGMP2G = 0.08169727;
  KmPGMP3G = 1.165312;
  KmPYKADP = 0.4232878;
  KmPYKATP = 1.679326;
  KmPYKPEP = 0.1146875;
  KmPYKPYR = 21.28758;
  L0 = 0.7444282;
  NADHmedium = 0.199308;
  NADmedium = 0.7908032;
  P2Gwashin = 0.01310468;
  P3Gwashin = 0.1260377;
  PEPwashin = 0.009831701;
  PYRwashin = 1.889132;
  Phi = 1.204703;
  TRIOwashin = 3.014369;
  VmADH = 9.669623;
  VmALD = 3.398948;
  VmENO = 8.104612;
  VmG3PA = 0.8444449;
  VmG3PDH = 0.5833806;
  VmGAPDHf = 8.213403;
  VmGLK = 6.744206;
  VmGLT = 1.29073;
  VmPDC = 6.139857;
  VmPFK = 5.674253;
  VmPGI = 8.056214;
  VmPGK = 23.43072;
  VmPGM = 46.73327;
  VmPYK = 35.9167;
  biomassFac = 0.8912961;
  ccWashInConcMult = 1.062684;
  gR = 3.476513;
  k0 = 0.025;
  nATP = 1;
  nPDC = 2.380189;

  // Reactions:
  v_ACEclear: -> ACE; k0*(ACEwashin*ccWashInConcMult - ACE);
  v_ADH: ACE + NADH -> NAD; -(biomassFac*VmADH*(ETOH*NAD - ACE*NADH/KeqADH)/(KiADHNAD*KmADHETOH*(1 + ETOH*KmADHNAD/(KiADHNAD*KmADHETOH) + KmADHNADH*ACE/(KiADHNADH*KmADHACE) + NAD/KiADHNAD + ETOH*NAD/(KiADHNAD*KmADHETOH) + ETOH*ACE*NAD/(KiADHACE*KiADHNAD*KmADHETOH) + KmADHNADH*ACE*NAD/(KiADHNAD*KiADHNADH*KmADHACE) + NADH/KiADHNADH + ETOH*KmADHNAD*NADH/(KiADHNAD*KiADHNADH*KmADHETOH) + ACE*NADH/(KiADHNADH*KmADHACE) + ETOH*ACE*NADH/(KiADHETOH*KiADHNADH*KmADHACE))));  // kegg.reaction:R00754
  v_ADPclear: -> ADP; k0*(ADPmedium - ADP);
  v_AK: 2 ADP -> AMP + ATP; 133.333*biomassFac*AKopt*(ADP^2 - AMP*ATP/KeqAK);
  v_ALD: F16P -> 2 TRIO; biomassFac*VmALD*(F16P - KeqTPI*TRIO^2/(KeqALD*(1 + KeqTPI)^2))/(KmALDF16P*(1 + F16P/KmALDF16P + TRIO/((1 + KeqTPI)*KmALDDHAP) + KeqTPI*TRIO/((1 + KeqTPI)*KmALDGAP) + KeqTPI*F16P*TRIO/((1 + KeqTPI)*KmALDF16P*KmALDGAPi) + KeqTPI*TRIO^2/((1 + KeqTPI)^2*KmALDDHAP*KmALDGAP)));  // kegg.reaction:R01068
  v_AMPclear: -> AMP; k0*(AMPmedium - AMP);
  v_ATP: ATP -> ADP; biomassFac*KATPASE*ATP^nATP/(KmATP^nATP + ATP^nATP);  // obo.go:0006200
  v_ATPclear: -> ATP; k0*(ATPmedium - ATP);
  v_BPGclear: -> BPG; k0*(BPGwashin*ccWashInConcMult - BPG);
  v_ENO: P2G -> PEP; biomassFac*VmENO*(P2G - PEP/KeqENO)/(KmENOP2G*(1 + P2G/KmENOP2G + PEP/KmENOPEP));  // kegg.reaction:R00658
  v_F16Pclear: -> F16P; k0*(ccWashInConcMult*F16Pwashin - F16P);
  v_F6Pclear: -> F6P; -(ccWashInConcMult*F6Pwashin*k0*F6P);
  v_G3PA: G3P -> ; biomassFac*VmG3PA*G3P/(KmG3PAG3P*(1 + Phi/KmG3PAPhi)*(1 + G3P/KmG3PAG3P));
  v_G3PDH: NADH + TRIO -> G3P + NAD; biomassFac*VmG3PDH*(-(G3P*NAD/KeqG3PDH) + NADH*TRIO/(1 + KeqTPI))/(KmG3PDHDHAP*KmG3PDHNADH*(1 + ADP/KmG3PDHADP + ATP/KmG3PDHATP + F16P/KmG3PDHF16P)*(1 + NAD/KmG3PDHNAD + NADH/KmG3PDHNADH)*(1 + G3P/KmG3PDHG3P + TRIO/((1 + KeqTPI)*KmG3PDHDHAP)));  // modifiers: ADP, ATP, F16P
  v_G3Pclear: -> G3P; k0*(ccWashInConcMult*G3Pwashin - G3P);
  v_G6Pclear: -> G6P; k0*(ccWashInConcMult*G6Pwashin - G6P);
  v_GAPDH: NAD + TRIO -> BPG + NADH; biomassFac*(-(VmGAPDHf*BPG*NADH/(KeqGAPDH*KmGAPDHGAP*KmGAPDHNAD)) + KeqTPI*VmGAPDHf*NAD*TRIO/((1 + KeqTPI)*KmGAPDHGAP*KmGAPDHNAD))/((1 + NAD/KmGAPDHNAD + NADH/KmGAPDHNADH)*(1 + BPG/KmGAPDHBPG + KeqTPI*TRIO/((1 + KeqTPI)*KmGAPDHGAP)));  // kegg.reaction:R01061
  v_GLCiclear: -> GLCi; k0*(GLCmedium - GLCi);  // obo.go:0015758
  v_GLK: ATP + GLCi -> ADP + G6P; biomassFac*VmGLK*(-(ADP*G6P/KeqGLK) + ATP*GLCi)/(KmGLKATP*KmGLKGLCi*(1 + ADP/KmGLKADP + ATP/KmGLKATP)*(1 + G6P/KmGLKG6P + GLCi/KmGLKGLCi));  // kegg.reaction:R00299
  v_GLYCO: ATP + G6P -> ADP; biomassFac*KGLYCOGEN*ATP*G6P;
  v_NADHclear: -> NADH; k0*(NADHmedium - NADH);
  v_NADclear: -> NAD; k0*(NADmedium - NAD);
  v_P2Gclear: -> P2G; k0*(ccWashInConcMult*P2Gwashin - P2G);
  v_P3Gclear: -> P3G; k0*(ccWashInConcMult*P3Gwashin - P3G);
  v_PDC: PYR -> ACE; biomassFac*VmPDC*PYR^nPDC/(KmPDCPYR^nPDC*(1 + PYR^nPDC/KmPDCPYR^nPDC));  // kegg.reaction:R00224
  v_PEPclear: -> PEP; k0*(ccWashInConcMult*PEPwashin - PEP);
  v_PFK: ATP + F6P -> ADP + F16P; biomassFac*gR*VmPFK*ATP*F6P*(1 + ATP/KmPFKATP + F6P/KmPFKF6P + gR*ATP*F6P/(KmPFKATP*KmPFKF6P))/(KmPFKATP*KmPFKF6P*(L0*(1 + CPFKAMP*AMP/KPFKAMP)^2*(1 + CiPFKATP*ATP/KiPFKATP)^2*(1 + CPFKATP*ATP/KmPFKATP)^2*(1 + CPFKF26BP*F26BP/KPFKF26BP + CPFKF16BP*F16P/KPFKF16BP)^2/((1 + AMP/KPFKAMP)^2*(1 + ATP/KiPFKATP)^2*(1 + F26BP/KPFKF26BP + F16P/KPFKF16BP)^2) + (1 + ATP/KmPFKATP + F6P/KmPFKF6P + gR*ATP*F6P/(KmPFKATP*KmPFKF6P))^2));  // modifiers: AMP; kegg.reaction:R04779
  v_PGI: G6P -> F6P; biomassFac*VmPGI*(-(F6P/KeqPGI) + G6P)/(KmPGIG6P*(1 + F6P/KmPGIF6P + G6P/KmPGIG6P));  // kegg.reaction:R02740
  v_PGK: ADP + BPG -> ATP + P3G; biomassFac*VmPGK*(KeqPGK*ADP*BPG - ATP*P3G)/(KmPGKATP*KmPGKP3G*(1 + ADP/KmPGKADP + ATP/KmPGKATP)*(1 + BPG/KmPGKBPG + P3G/KmPGKP3G));  // kegg.reaction:R01512
  v_PGM: P3G -> P2G; biomassFac*VmPGM*(-(P2G/KeqPGM) + P3G)/(KmPGMP3G*(1 + P2G/KmPGMP2G + P3G/KmPGMP3G));  // kegg.reaction:R01518
  v_PYK: ADP + PEP -> ATP + PYR; biomassFac*VmPYK*(ADP*PEP - ATP*PYR/KeqPYK)/(KmPYKADP*KmPYKPEP*(1 + ADP/KmPYKADP + ATP/KmPYKATP)*(1 + PEP/KmPYKPEP + PYR/KmPYKPYR));
  v_PYRclear: -> PYR; k0*(ccWashInConcMult*PYRwashin - PYR);
  v_SUC: 2 ACE + 3 NAD + 4 ATP -> 3 NADH + 4 ADP; biomassFac*KSUCC*ACE;
  v_TRIOclear: -> TRIO; k0*(ccWashInConcMult*TRIOwashin - TRIO);
  v_Treha: ATP + 2 G6P -> ADP; biomassFac*KTREHALOSE*ATP*G6P;

  // Unit definitions:
  unit L = litre;
  unit mM = 1e-3 mole / litre;
  unit min = 60 second;
  unit mmol = 1e-3 mole;
end
