// SBML level 2 version 4

function IBMX_flux_1(IBMX, IBMXex, ki)
  ki*(IBMXex - IBMX);
end

function cAMP_degradation_1(IBMX, KD_IBMX, PDE, cAMP, kdeg_cAMP, pPDE, xi_pPDE)
  kdeg_cAMP*KD_IBMX/(KD_IBMX + IBMX)*(PDE + xi_pPDE*pPDE)*cAMP;
end

function function_6__irreversible__2(MOR_DAMGO, alphaI_betaI_gammaI, kf)
  kf*MOR_DAMGO*alphaI_betaI_gammaI;
end
function_6__irreversible__2 is "function 6 (irreversible)_2";

function cAMP_production__irreversible___1__1(AC, AC_Fsk, AC_alphaS_GTP, ks_AC_cAMP, xi_AC_cAMP_Fsk, xi_AC_cAMP_alphaS_GTP)
  ks_AC_cAMP*AC + ks_AC_cAMP*xi_AC_cAMP_Fsk*AC_alphaS_GTP + ks_AC_cAMP*xi_AC_cAMP_alphaS_GTP*AC_Fsk;
end
cAMP_production__irreversible___1__1 is "cAMP production (irreversible) [1]_1";

function function_5__reversible__1(DAMGO, MOR, MOR_DAMGO, kb, kf)
  MOR*kf*DAMGO - MOR_DAMGO*kb;
end
function_5__reversible__1 is "function 5 (reversible)_1";

function function_5__reversible__2(Fentanyl, MOR, MOR_Fentanyl, kb, kf)
  MOR*kf*Fentanyl - MOR_Fentanyl*kb;
end
function_5__reversible__2 is "function 5 (reversible)_2";

function function_5__reversible__3(fiveHT, fiveHT4, fiveHT4_5HT, kb, kf)
  fiveHT4*kf*fiveHT - fiveHT4_5HT*kb;
end
function_5__reversible__3 is "function 5 (reversible)_3";

function function_6__irreversible__1(alphaS_betaS_gammaS, fiveHT4_5HT, kf)
  kf*fiveHT4_5HT*alphaS_betaS_gammaS;
end
function_6__irreversible__1 is "function 6 (irreversible)_1";

function function_6__irreversible__3(MOR_Fentanyl, alphaI_betaI_gammaI, kf)
  kf*MOR_Fentanyl*alphaI_betaI_gammaI;
end
function_6__irreversible__3 is "function 6 (irreversible)_3";

function function_1__reversible__1(AC, AC_Fsk, Fsk, KD_Fsk, kf_Fsk)
  AC*kf_Fsk*Fsk - AC_Fsk*KD_Fsk*kf_Fsk;
end
function_1__reversible__1 is "function 1 (reversible)_1";

model PKA__cycle()
  // PKA cycle_1

  // Compartments:
  compartment cytosol = 1;  // GO:0005829

  // Species:
  species AC_Fsk in cytosol = 0;  // hasPart uniprot:D4A3N4; hasPart chembl.compound:CHEMBL52606
  species cAMP in cytosol = 0;  // CHEBI:17489
  species IBMX in cytosol = 0;  // chembl.compound:CHEMBL275084
  species PDE in cytosol = PDE_total;  // uniprot:Q9GQU6
  species pPDE in cytosol = 0;  // isVersionOf uniprot:Q9GQU6
  species AC in cytosol = AC_total;  // chembl.compound:CHEMBL52606
  species fiveHT4 in cytosol = fiveHT4_total;  // uniprot:Q62758
  species fiveHT4_5HT in cytosol = 0;  // hasPart chembl.compound:CHEMBL39; hasPart uniprot:Q62758
  species MOR in cytosol = MOR_total;  // uniprot:P33535
  species MOR_DAMGO in cytosol = 0;  // hasPart uniprot:P33535; hasPart chembl.compound:CHEMBL38874
  species MOR_Fentanyl in cytosol = 0;  // hasPart uniprot:P33535; hasPart chembl.compound:CHEMBL596
  species alphaS_betaS_gammaS in cytosol = alphaS_betaS_gammaS_total;  // isVersionOf uniprot:P30951
  species alphaI_betaI_gammaI in cytosol = alphaI_betaI_gammaI_total;  // isVersionOf uniprot:P30951
  species betaS_gammaS in cytosol = 0;  // isVersionOf GO:0031680
  species betaI_gammaI in cytosol = 0;  // isVersionOf GO:0031680
  species alphaS_GDP in cytosol = 0;  // hasPart chembl.compound:CHEMBL384759; hasPart uniprot:Q5JWF2
  species alphaS_GTP in cytosol = 0;  // hasPart uniprot:Q5JWF2; hasPart CHEBI:15996
  species alphaI_GDP in cytosol = 0;  // hasPart uniprot:P63096; hasPart chembl.compound:CHEMBL384759
  species alphaI_GTP in cytosol = 0;  // hasPart uniprot:P63096; hasPart CHEBI:15996
  species AC_alphaS_GTP in cytosol = 0;  // hasPart CHEBI:15996; hasPart uniprot:D4A3N4; hasPart uniprot:Q5JWF2
  species AC_alphaI_GTP in cytosol = 0;  // hasPart uniprot:P63096; hasPart CHEBI:15996; hasPart uniprot:D4A3N4

  // Parameters:
  Fsk = 0;  // chembl.compound:CHEMBL52606
  DAMGO = 0;  // chembl.compound:CHEMBL38874
  Fentanyl = 0;  // chembl.compound:CHEMBL596
  NTX = 0;  // CHEBI:7465
  CTOP = 0;  // pubchem.compound:90479805
  IBMXex = 0;  // chembl.compound:CHEMBL275084
  DMSO = 0;  // chembl.compound:CHEMBL504
  H89 = 0;  // chembl.compound:CHEMBL104264
  fourABnOH = 0;
  kf_Fsk = 0;
  KD_Fsk = 0;
  kp_AC = 0;
  kdp_AC = 0;
  kf_cAMP = 0;
  kf_RIIp_cAMP_C_2__RIIp_2 = 0;
  kdeg_cAMP = 0;
  KD_IBMX = 0;
  xi_pPDE = 0;
  KD_cAMP = 0;
  xi_b_Sp8_Br_cAMPS = 0;
  xi_KD_Sp8_Br_cAMPS = 0;
  AC_total = 0;  // uniprot:D4A3N4
  RII2_total = 0;  // uniprot:P12369
  PDE_total = 0;  // uniprot:Q9GQU6
  fiveHT_time_0 = 0;  // isPropertyOf chembl.compound:CHEMBL39; isPropertyOf chembl.compound:CHEMBL39
  fiveHT_level_0 = 0;  // isPropertyOf chembl.compound:CHEMBL39; isPropertyOf chembl.compound:CHEMBL39
  fiveHT4_total = 0;  // uniprot:Q62758
  MOR_total = 0;  // uniprot:P33535
  alphaS_betaS_gammaS_total = 0;  // isVersionOf uniprot:P30951
  alphaI_betaI_gammaI_total = 0;  // isVersionOf uniprot:P30951
  ks_AC_cAMP = 0;
  kf_RII_C_2__RII_2 = 0;
  kf_RII_2__RII_C_2 = 0;
  rel_open = 0;
  xi_rel_open = 0;

  // Assignment rules:
  fiveHT := piecewise(0, time < fiveHT_time_0, fiveHT_level_0);

  // Reactions:
  AC___AC_Fsk: AC -> AC_Fsk; cytosol*function_1__reversible__1(AC, AC_Fsk, Fsk, KD_Fsk, kf_Fsk); AC___AC_Fsk is "AC = AC_Fsk";  // hasPart GO:0065003; hasPart GO:0032984
  IBMX_0: => IBMX; cytosol*IBMX_flux_1(IBMX, IBMXex, ki);  // GO:0055085
    ki = 0.1;
  cAMP__: cAMP => ; cytosol*cAMP_degradation_1(IBMX, KD_IBMX, PDE, cAMP, kdeg_cAMP, pPDE, xi_pPDE); cAMP__ is "cAMP ->";  // modifiers: IBMX, PDE, pPDE; GO:0006198; isPartOf GO:0010737
  ___cAMP: => cAMP; cytosol*cAMP_production__irreversible___1__1(AC, AC_Fsk, AC_alphaS_GTP, ___cAMP_ks_AC_cAMP, xi_AC_cAMP_Fsk, xi_AC_cAMP_alphaS_GTP); ___cAMP is "-> cAMP";  // modifiers: AC, AC_alphaS_GTP, AC_Fsk; GO:0006171; isPartOf GO:0010737
    ___cAMP_ks_AC_cAMP = 0.1; xi_AC_cAMP_Fsk = 0.1; xi_AC_cAMP_alphaS_GTP = 0.1;
  AC_alphaI_GTP____AC___alphaI_GTP: AC_alphaI_GTP -> AC + alphaI_GTP; cytosol*(AC_alphaI_GTP____AC___alphaI_GTP_k1*AC_alphaI_GTP - AC_alphaI_GTP____AC___alphaI_GTP_k2*AC*alphaI_GTP); AC_alphaI_GTP____AC___alphaI_GTP is "AC_alphaI_GTP = AC + alphaI_GTP";  // hasPart GO:0001965; hasPart GO:0032984
    AC_alphaI_GTP____AC___alphaI_GTP_k1 = 0.1; AC_alphaI_GTP____AC___alphaI_GTP_k2 = 0.1;
  AC_alphaS_GTP_____AC___alphaS_GTP: AC_alphaS_GTP -> AC + alphaS_GTP; cytosol*(AC_alphaS_GTP_____AC___alphaS_GTP_k1*AC_alphaS_GTP - AC_alphaS_GTP_____AC___alphaS_GTP_k2*AC*alphaS_GTP); AC_alphaS_GTP_____AC___alphaS_GTP is "AC_alphaS_GTP = AC + alphaS_GTP";  // hasPart GO:0001965; GO:0032984
    AC_alphaS_GTP_____AC___alphaS_GTP_k1 = 0.1; AC_alphaS_GTP_____AC___alphaS_GTP_k2 = 0.1;
  MOR____MOR_DAMGO: MOR -> MOR_DAMGO; cytosol*function_5__reversible__1(DAMGO, MOR, MOR_DAMGO, MOR____MOR_DAMGO_kb, MOR____MOR_DAMGO_kf); MOR____MOR_DAMGO is "MOR = MOR_DAMGO";  // hasPart GO:0032984; hasPart GO:0031852; hasPart GO:0065003
    MOR____MOR_DAMGO_kb = 0.1; MOR____MOR_DAMGO_kf = 0.1;
  MOR____MOR_Fentanyl: MOR -> MOR_Fentanyl; cytosol*function_5__reversible__2(Fentanyl, MOR, MOR_Fentanyl, MOR____MOR_Fentanyl_kb, MOR____MOR_Fentanyl_kf); MOR____MOR_Fentanyl is "MOR = MOR_Fentanyl";  // hasPart GO:0031852; hasPart GO:0065003; hasPart GO:0032984
    MOR____MOR_Fentanyl_kb = 0.1; MOR____MOR_Fentanyl_kf = 0.1;
  MOR_DAMGO___: MOR_DAMGO => ; cytosol*MOR_DAMGO____k1*MOR_DAMGO; MOR_DAMGO___ is "MOR_DAMGO ->";  // GO:0043624
    MOR_DAMGO____k1 = 0.1;
  MOR_Fentanyl__: MOR_Fentanyl => ; cytosol*MOR_Fentanyl___k1*MOR_Fentanyl; MOR_Fentanyl__ is "MOR_Fentanyl ->";  // GO:0043624
    MOR_Fentanyl___k1 = 0.1;
  fiveHT4___fiveHT4_5HT: fiveHT4 -> fiveHT4_5HT; cytosol*function_5__reversible__3(fiveHT, fiveHT4, fiveHT4_5HT, fiveHT4___fiveHT4_5HT_kb, fiveHT4___fiveHT4_5HT_kf); fiveHT4___fiveHT4_5HT is "fiveHT4 = fiveHT4_5HT";  // hasPart GO:0043624; hasPart GO:0034622
    fiveHT4___fiveHT4_5HT_kb = 0.1; fiveHT4___fiveHT4_5HT_kf = 0.1;
  fiveHT4_5HT___: fiveHT4_5HT => ; cytosol*fiveHT4_5HT____k1*fiveHT4_5HT; fiveHT4_5HT___ is "fiveHT4_5HT ->";  // GO:0043624
    fiveHT4_5HT____k1 = 0.1;
  alphaS_GTP____alphaS_GDP: alphaS_GTP => alphaS_GDP; cytosol*alphaS_GTP____alphaS_GDP_k1*alphaS_GTP; alphaS_GTP____alphaS_GDP is "alphaS_GTP -> alphaS_GDP";  // GO:0046039
    alphaS_GTP____alphaS_GDP_k1 = 0.1;
  alphaI_GTP____alphaI_GDP: alphaI_GTP => alphaI_GDP; cytosol*alphaI_GTP____alphaI_GDP_k1*alphaI_GTP; alphaI_GTP____alphaI_GDP is "alphaI_GTP -> alphaI_GDP";  // GO:0046039
    alphaI_GTP____alphaI_GDP_k1 = 0.1;
  alphaI_GDP___betaI_gammaI____alphaI_betaI_gammaI: alphaI_GDP + betaI_gammaI => alphaI_betaI_gammaI; cytosol*alphaI_GDP___betaI_gammaI____alphaI_betaI_gammaI_k1*alphaI_GDP*betaI_gammaI; alphaI_GDP___betaI_gammaI____alphaI_betaI_gammaI is "alphaI_GDP + betaI_gammaI -> alphaI_betaI_gammaI";  // GO:0031683
    alphaI_GDP___betaI_gammaI____alphaI_betaI_gammaI_k1 = 0.1;
  alphaS_GDP___betaS_gammaS____alphaS_betaS_gammaS: alphaS_GDP + betaS_gammaS => alphaS_betaS_gammaS; cytosol*alphaS_GDP___betaS_gammaS____alphaS_betaS_gammaS_k1*alphaS_GDP*betaS_gammaS; alphaS_GDP___betaS_gammaS____alphaS_betaS_gammaS is "alphaS_GDP + betaS_gammaS -> alphaS_betaS_gammaS";  // GO:0031683
    alphaS_GDP___betaS_gammaS____alphaS_betaS_gammaS_k1 = 0.1;
  alphaS_betaS_gammaS_____alphaS_GTP___betaS_gammaS__2: alphaS_betaS_gammaS => alphaS_GTP + betaS_gammaS; cytosol*function_6__irreversible__1(alphaS_betaS_gammaS, fiveHT4_5HT, alphaS_betaS_gammaS_____alphaS_GTP___betaS_gammaS__2_kf); alphaS_betaS_gammaS_____alphaS_GTP___betaS_gammaS__2 is "alphaS_betaS_gammaS -> alphaS_GTP + betaS_gammaS, 2";  // modifiers: fiveHT4_5HT; GO:0043624
    alphaS_betaS_gammaS_____alphaS_GTP___betaS_gammaS__2_kf = 0.1;
  alphaI_betaI_gammaI____alphaI_GTP___betaI_gammaI: alphaI_betaI_gammaI => alphaI_GTP + betaI_gammaI; cytosol*alphaI_betaI_gammaI____alphaI_GTP___betaI_gammaI_k1*alphaI_betaI_gammaI; alphaI_betaI_gammaI____alphaI_GTP___betaI_gammaI is "alphaI_betaI_gammaI -> alphaI_GTP + betaI_gammaI";  // GO:0043624
    alphaI_betaI_gammaI____alphaI_GTP___betaI_gammaI_k1 = 0.1;
  alphaS_betaS_gammaS_____alphaS_GTP___betaS_gammaS: alphaS_betaS_gammaS => alphaS_GTP + betaS_gammaS; cytosol*alphaS_betaS_gammaS_____alphaS_GTP___betaS_gammaS_k1*alphaS_betaS_gammaS; alphaS_betaS_gammaS_____alphaS_GTP___betaS_gammaS is "alphaS_betaS_gammaS -> alphaS_GTP + betaS_gammaS";  // GO:0043624
    alphaS_betaS_gammaS_____alphaS_GTP___betaS_gammaS_k1 = 0.1;
  alphaI_betaI_gammaI____alphaI_GTP___betaI_gammaI__2: alphaI_betaI_gammaI => alphaI_GTP + betaI_gammaI; cytosol*function_6__irreversible__2(MOR_DAMGO, alphaI_betaI_gammaI, alphaI_betaI_gammaI____alphaI_GTP___betaI_gammaI__2_kf); alphaI_betaI_gammaI____alphaI_GTP___betaI_gammaI__2 is "alphaI_betaI_gammaI -> alphaI_GTP + betaI_gammaI, 2";  // modifiers: MOR_DAMGO; GO:0043624
    alphaI_betaI_gammaI____alphaI_GTP___betaI_gammaI__2_kf = 0.1;
  alphaI_betaI_gammaI____alphaI_GTP___betaI_gammaI__3: alphaI_betaI_gammaI => alphaI_GTP + betaI_gammaI; cytosol*function_6__irreversible__3(MOR_Fentanyl, alphaI_betaI_gammaI, alphaI_betaI_gammaI____alphaI_GTP___betaI_gammaI__3_kf); alphaI_betaI_gammaI____alphaI_GTP___betaI_gammaI__3 is "alphaI_betaI_gammaI -> alphaI_GTP + betaI_gammaI, 3";  // modifiers: MOR_Fentanyl; GO:0043624
    alphaI_betaI_gammaI____alphaI_GTP___betaI_gammaI__3_kf = 0.1;

  // Unit definitions:
  unit volume = 1e-12 litre;
  unit time = 3600 second;
  unit substance = 1e-3 mole;
end
